/UNITS,SI
/PREP7

!节点坐标
N,     1,          -0.300,           0.000,           0.000
N,     2,           0.000,           0.000,           0.000
N,     3,           0.300,           0.000,           0.000
N,     4,           0.075,           0.150,          -0.000
N,     5,          -0.075,           0.150,          -0.000
N,     6,          -0.060,           0.150,          -0.000
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N,    68,          -0.030,           0.000,           0.000

!方向点
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N,   138,    -1.50000e-02,     3.00000e-02,     0.00000e+00

!材性
MP, EX,      1,      2.060e+11
MP, NUXY,    1,      3.000e-01
MP, DENS,    1,      7.850e+03
MP, ALPX,    1,      1.200e-05
TBDE,BKIN,    1,,,
TB,BKIN,    1,1,2,1
TBTEMP,0.0
TBDATA,1,      2.350e+08,0

!梁杆索
ET,        1, BEAM44
KEYOPT,    1, 7,      0
KEYOPT,    1, 8,      0

!截面

!梁截面
R,     1, 0
SECTYPE,1,BEAM,RECT,,0
SECOFFSET,CENT
SECDATA,0.002000,0.002000,2,2
R,     2, 0
SECTYPE,2,BEAM,HREC,,0
SECOFFSET,CENT
SECDATA,0.010000,0.010000,0.002000,0.002000,0.002000,0.002000,0,0,0,0

!杆截面

!索截面

!单元

!梁单元

TYPE,      1
MAT,       1
REAL,      1
SECNUM,    1
EN,      1,    1,   60,   69
EN,      2,    2,   51,   70

TYPE,      1
MAT,       1
REAL,      2
SECNUM,    2
EN,      3,    2,   42,   71
EN,      4,    4,   33,   72
EN,      5,    2,   24,   73
EN,      6,    5,   15,   74
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EN,     52,   50,    4,  120

TYPE,      1
MAT,       1
REAL,      1
SECNUM,    1
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EN,     70,   68,    2,  138

!杆单元

!索单元

!连接单元

!板单元

!层号
esel,s,,,1
esel,a,,,2
esel,a,,,3
esel,a,,,4
esel,a,,,5
esel,a,,,6
esel,a,,,7
esel,a,,,8
esel,a,,,9
esel,a,,,10
esel,a,,,11
esel,a,,,12
esel,a,,,13
esel,a,,,14
esel,a,,,15
esel,a,,,16
esel,a,,,17
esel,a,,,18
esel,a,,,19
esel,a,,,20
esel,a,,,21
esel,a,,,22
esel,a,,,23
esel,a,,,24
esel,a,,,25
esel,a,,,26
esel,a,,,27
esel,a,,,28
esel,a,,,29
esel,a,,,30
esel,a,,,31
esel,a,,,32
esel,a,,,33
esel,a,,,34
esel,a,,,35
esel,a,,,36
esel,a,,,37
esel,a,,,38
esel,a,,,39
esel,a,,,40
esel,a,,,41
esel,a,,,42
esel,a,,,43
esel,a,,,44
esel,a,,,45
esel,a,,,46
esel,a,,,47
esel,a,,,48
esel,a,,,49
esel,a,,,50
esel,a,,,51
esel,a,,,52
esel,a,,,53
esel,a,,,54
esel,a,,,55
esel,a,,,56
esel,a,,,57
esel,a,,,58
esel,a,,,59
esel,a,,,60
esel,a,,,61
esel,a,,,62
esel,a,,,63
esel,a,,,64
esel,a,,,65
esel,a,,,66
esel,a,,,67
esel,a,,,68
esel,a,,,69
esel,a,,,70
cm,Group1,elem

allsel

!节点约束
/SOLU
D,    1, UX,   0
D,    1, UY,   0
D,    1, UZ,   0
D,    3, UX,   0
D,    3, UY,   0
D,    3, UZ,   0

!节点荷载
/SOLU
FCUM,ADD

!工况0
*Create,Force_C0
Acel,0,0,9.8
*End

!工况0
*Use,Force_C0,1.0
